// SBML level 3 version 2

model biocrnpyler_218693()
  // model units - substance: mole, time: second, volume: litre, area: square_metre, length: metre, extent: mole

  // Compartments:
  compartment default_combinedbiocrnpyler_218693 = 1e-6;

  // Species:
  species rna_proton_pump_combinedbiocrnpyler_218693 in default_combinedbiocrnpyler_218693 = 0;
  species dna_proton_pump_combinedbiocrnpyler_218693 in default_combinedbiocrnpyler_218693 = 10/default_combinedbiocrnpyler_218693;
  species protein_proton_pump_combinedbiocrnpyler_218693 in default_combinedbiocrnpyler_218693 = 0;
  species protein_proton_pump_b_combinedbiocrnpyler_218693 in default_combinedbiocrnpyler_218693 = 0;
  species rna_atpsyn_combinedbiocrnpyler_218693 in default_combinedbiocrnpyler_218693 = 0;
  species dna_atpsyn_combinedbiocrnpyler_218693 in default_combinedbiocrnpyler_218693 = 10/default_combinedbiocrnpyler_218693;
  species protein_atpsyn_combinedbiocrnpyler_218693 in default_combinedbiocrnpyler_218693 = 0;
  species protein_atpsyn_b_combinedbiocrnpyler_218693 in default_combinedbiocrnpyler_218693 = 0;
  species protein_RNAP_machinery_combinedbiocrnpyler_218693 in default_combinedbiocrnpyler_218693 = 20/default_combinedbiocrnpyler_218693;
  species protein_Ribo_machinery_combinedbiocrnpyler_218693 in default_combinedbiocrnpyler_218693 = 20/default_combinedbiocrnpyler_218693;
  species protein_RNAse_machinery_combinedbiocrnpyler_218693 in default_combinedbiocrnpyler_218693 = 20/default_combinedbiocrnpyler_218693;
  species complex_dna_proton_pump_protein_RNAP_machinery_combinedbiocrnpyler_218693 in default_combinedbiocrnpyler_218693 = 0;
  species complex_protein_Ribo_machinery_rna_proton_pump_combinedbiocrnpyler_218693 in default_combinedbiocrnpyler_218693 = 0;
  species complex_protein_RNAse_machinery_rna_proton_pump_combinedbiocrnpyler_218693 in default_combinedbiocrnpyler_218693 = 0;
  species complex_dna_atpsyn_protein_RNAP_machinery_combinedbiocrnpyler_218693 in default_combinedbiocrnpyler_218693 = 0;
  species complex_protein_Ribo_machinery_rna_atpsyn_combinedbiocrnpyler_218693 in default_combinedbiocrnpyler_218693 = 0;
  species complex_protein_RNAse_machinery_rna_atpsyn_combinedbiocrnpyler_218693 in default_combinedbiocrnpyler_218693 = 0;

  // Reactions:
  r0_combinedbiocrnpyler_218693: dna_proton_pump_combinedbiocrnpyler_218693 + protein_RNAP_machinery_combinedbiocrnpyler_218693 => complex_dna_proton_pump_protein_RNAP_machinery_combinedbiocrnpyler_218693; r0_combinedbiocrnpyler_218693_k*dna_proton_pump_combinedbiocrnpyler_218693*protein_RNAP_machinery_combinedbiocrnpyler_218693;
    r0_combinedbiocrnpyler_218693_k = 100;
  r1_combinedbiocrnpyler_218693: complex_dna_proton_pump_protein_RNAP_machinery_combinedbiocrnpyler_218693 => rna_proton_pump_combinedbiocrnpyler_218693 + protein_RNAP_machinery_combinedbiocrnpyler_218693; r1_combinedbiocrnpyler_218693_k*complex_dna_proton_pump_protein_RNAP_machinery_combinedbiocrnpyler_218693;
    r1_combinedbiocrnpyler_218693_k = 0.05;
  r2_combinedbiocrnpyler_218693: rna_proton_pump_combinedbiocrnpyler_218693 + protein_Ribo_machinery_combinedbiocrnpyler_218693 => complex_protein_Ribo_machinery_rna_proton_pump_combinedbiocrnpyler_218693; r2_combinedbiocrnpyler_218693_k*rna_proton_pump_combinedbiocrnpyler_218693*protein_Ribo_machinery_combinedbiocrnpyler_218693;
    r2_combinedbiocrnpyler_218693_k = 100;
  r3_combinedbiocrnpyler_218693: complex_protein_Ribo_machinery_rna_proton_pump_combinedbiocrnpyler_218693 => rna_proton_pump_combinedbiocrnpyler_218693 + protein_proton_pump_combinedbiocrnpyler_218693 + protein_Ribo_machinery_combinedbiocrnpyler_218693; r3_combinedbiocrnpyler_218693_k*complex_protein_Ribo_machinery_rna_proton_pump_combinedbiocrnpyler_218693;
    r3_combinedbiocrnpyler_218693_k = 0.05;
  r4_combinedbiocrnpyler_218693: rna_proton_pump_combinedbiocrnpyler_218693 + protein_RNAse_machinery_combinedbiocrnpyler_218693 => complex_protein_RNAse_machinery_rna_proton_pump_combinedbiocrnpyler_218693; r4_combinedbiocrnpyler_218693_k*rna_proton_pump_combinedbiocrnpyler_218693*protein_RNAse_machinery_combinedbiocrnpyler_218693;
    r4_combinedbiocrnpyler_218693_k = 100;
  r5_combinedbiocrnpyler_218693: complex_protein_RNAse_machinery_rna_proton_pump_combinedbiocrnpyler_218693 => protein_RNAse_machinery_combinedbiocrnpyler_218693; r5_combinedbiocrnpyler_218693_k*complex_protein_RNAse_machinery_rna_proton_pump_combinedbiocrnpyler_218693;
    r5_combinedbiocrnpyler_218693_k = 0.001;
  r6_combinedbiocrnpyler_218693: protein_proton_pump_combinedbiocrnpyler_218693 => protein_proton_pump_b_combinedbiocrnpyler_218693; r6_combinedbiocrnpyler_218693_k*protein_proton_pump_combinedbiocrnpyler_218693;
    r6_combinedbiocrnpyler_218693_k = 0.3;
  r7_combinedbiocrnpyler_218693: dna_atpsyn_combinedbiocrnpyler_218693 + protein_RNAP_machinery_combinedbiocrnpyler_218693 => complex_dna_atpsyn_protein_RNAP_machinery_combinedbiocrnpyler_218693; r7_combinedbiocrnpyler_218693_k*dna_atpsyn_combinedbiocrnpyler_218693*protein_RNAP_machinery_combinedbiocrnpyler_218693;
    r7_combinedbiocrnpyler_218693_k = 100;
  r8_combinedbiocrnpyler_218693: complex_dna_atpsyn_protein_RNAP_machinery_combinedbiocrnpyler_218693 => rna_atpsyn_combinedbiocrnpyler_218693 + protein_RNAP_machinery_combinedbiocrnpyler_218693; r8_combinedbiocrnpyler_218693_k*complex_dna_atpsyn_protein_RNAP_machinery_combinedbiocrnpyler_218693;
    r8_combinedbiocrnpyler_218693_k = 0.05;
  r9_combinedbiocrnpyler_218693: rna_atpsyn_combinedbiocrnpyler_218693 + protein_Ribo_machinery_combinedbiocrnpyler_218693 => complex_protein_Ribo_machinery_rna_atpsyn_combinedbiocrnpyler_218693; r9_combinedbiocrnpyler_218693_k*rna_atpsyn_combinedbiocrnpyler_218693*protein_Ribo_machinery_combinedbiocrnpyler_218693;
    r9_combinedbiocrnpyler_218693_k = 100;
  r10_combinedbiocrnpyler_218693: complex_protein_Ribo_machinery_rna_atpsyn_combinedbiocrnpyler_218693 => rna_atpsyn_combinedbiocrnpyler_218693 + protein_atpsyn_combinedbiocrnpyler_218693 + protein_Ribo_machinery_combinedbiocrnpyler_218693; r10_combinedbiocrnpyler_218693_k*complex_protein_Ribo_machinery_rna_atpsyn_combinedbiocrnpyler_218693;
    r10_combinedbiocrnpyler_218693_k = 0.05;
  r11_combinedbiocrnpyler_218693: rna_atpsyn_combinedbiocrnpyler_218693 + protein_RNAse_machinery_combinedbiocrnpyler_218693 => complex_protein_RNAse_machinery_rna_atpsyn_combinedbiocrnpyler_218693; r11_combinedbiocrnpyler_218693_k*rna_atpsyn_combinedbiocrnpyler_218693*protein_RNAse_machinery_combinedbiocrnpyler_218693;
    r11_combinedbiocrnpyler_218693_k = 100;
  r12_combinedbiocrnpyler_218693: complex_protein_RNAse_machinery_rna_atpsyn_combinedbiocrnpyler_218693 => protein_RNAse_machinery_combinedbiocrnpyler_218693; r12_combinedbiocrnpyler_218693_k*complex_protein_RNAse_machinery_rna_atpsyn_combinedbiocrnpyler_218693;
    r12_combinedbiocrnpyler_218693_k = 0.001;
  r13_combinedbiocrnpyler_218693: protein_atpsyn_combinedbiocrnpyler_218693 => protein_atpsyn_b_combinedbiocrnpyler_218693; r13_combinedbiocrnpyler_218693_k*protein_atpsyn_combinedbiocrnpyler_218693;
    r13_combinedbiocrnpyler_218693_k = 0.3;

  // Unit definitions:
  unit square_metre = metre^2;
end
